<FDM_CONFIG NAME="F-16" VERSION="1.65">
<!--                                                                                        -
  File:        f16.xml
  Author:      Erik Hofman
  CVS Version: $Id$

  Function: Models an F-16A Block-32 (Basic US configuration)
  Status:   Beta

   Sources:
     Observers Aircraft, by William Green, 1987 Edition (ISBN 0-7232-3458-2)
     General Dynamics F-16 Dash-1 (basic drag and weight data only)
     NASA TP-1538 wind tunnel data. (Dec. 1979)
     NASA TP-3355 Supersonic Aerodynamc Characteristics of an Advanced F-16
                  Derivative Aircraft Configuration
     and Richard Murray's F16 Model page:
       http://www.cds.caltech.edu/~murray/projects/afosr95-vehicles/models/f16/

     Dryden Technical Reports Server documents:
         H-1999: Dynamic ground effects flight test of an F-15 aircraft.
         H-2177: Dynamic ground effect for a Cranked Arrow Wing Airplane.

   Related information:
     Harry Hillaker - Father of the F-16:
     http://www.codeonemagazine.com/archives/1991/articles/jul_91/july2a_91.html
   (C) 2001,2002 Erik Hofman
-->

  <METRICS>
    AC_WINGAREA   630.0
    AC_WINGSPAN    35.0
    AC_CHORD       21.94
    AC_HTAILAREA   00.0
    AC_HTAILARM     0.0
    AC_VTAILAREA   54.75
    AC_LV          15.87
    AC_IXX       9496.0
    AC_IYY      55814.0
    AC_IZZ      63100.0
    AC_IXZ        982.0
    AC_EMPTYWT  17400.0
    AC_CGLOC            -193.0  0.0  -5.1
    AC_AERORP           -189.5  0.0   3.9
    AC_EYEPTLOC         -336.2  0.0  29.5
    AC_POINTMASS  230.0 -336.2  0.0   0.0
  </METRICS>
  <UNDERCARRIAGE>
    AC_GEAR NOSE_LG   -299.6    0.0 -72.0 15000  5000 0.5 0.8 0.02 STEERABLE NOSE    80 RETRACT
    AC_GEAR LEFT_MLG  -158.6  -48.0 -71.6 22704 10000 0.5 0.8 0.02 FIXED     LEFT    0 RETRACT
    AC_GEAR RIGHT_MLG -158.6   48.0 -71.6 22704 10000 0.5 0.8 0.02 FIXED     RIGHT   0 RETRACT

    AC_GEAR LEFT_WT   -121.3 -189.0   0.0 10000  2000 0.2 0.2 0.2  FIXED     NONE    0 FIXED
    AC_GEAR RIGHT_WT  -121.3  189.0   0.0 10000  2000 0.2 0.2 0.2  FIXED     NONE    0 FIXED
    AC_GEAR TOP_VS     -27.2    0.0 123.2 10000  2000 0.2 0.2 0.2  FIXED     NONE    0 FIXED
    AC_GEAR LEFT_VFT   -97.6  -24.8 -52.0   200  5000 0.2 0.2 0.2  FIXED     NONE    0 FIXED
    AC_GEAR RIGHT_VFT  -97.6   24.8 -52.0   200  5000 0.2 0.2 0.2  FIXED     NONE    0 FIXED
    AC_GEAR INTAKE    -322.4    0.0 -36.6 10000  2000 0.2 0.2 0.2  FIXED     NONE    0 FIXED
    AC_GEAR RADOME    -486.6    0.0  -8.7 10000  2000 0.2 0.2 0.2  FIXED     NONE    0 FIXED
  </UNDERCARRIAGE>
  <PROPULSION>
    <AC_ENGINE FILE="F100-PW-229">
      XLOC        0.0
      YLOC        0.0
      ZLOC        0.0
      PITCH       0.0
      YAW         0.0
      FEED          0
      FEED          1
      <AC_THRUSTER FILE="direct">
        XLOC        0.0
        YLOC        0.0
        ZLOC        0.0
        PITCH       0.0
        YAW         0.0
      </AC_THRUSTER>
    </AC_ENGINE>
    <AC_TANK TYPE="FUEL" NUMBER="0">
      XLOC     -163.0
      YLOC       88.2
      ZLOC        4.3
      RADIUS      1
      CAPACITY 3486.0
      CONTENTS  500.0
    </AC_TANK>
    <AC_TANK TYPE="FUEL" NUMBER="1">
      XLOC     -163.0
      YLOC      -88.2
      ZLOC        4.3
      RADIUS      1
      CAPACITY 3486.0
      CONTENTS  500.0
    </AC_TANK>
  </PROPULSION>
  <FLIGHT_CONTROL NAME="F-16 FC">
   <COMPONENT NAME="elevator cmd limiter" TYPE="SUMMER">
     INPUT          fcs/elevator-cmd-norm
     INPUT          fcs/pitch-trim-cmd-norm
     BIAS           -0.1
     CLIPTO         -1.0 0.44
   </COMPONENT>
   <COMPONENT NAME="g load norm" TYPE="PURE_GAIN">
     INPUT          -accelerations/n-pilot-z-norm
     GAIN           0.125
   </COMPONENT>
   <COMPONENT NAME="g load error" TYPE="SUMMER">
     INPUT          fcs/elevator-cmd-limiter
     INPUT          fcs/g-load-norm
   </COMPONENT>
   <COMPONENT NAME="g load p" TYPE="PURE_GAIN">
     INPUT          fcs/g-load-error
     GAIN           0.66
   </COMPONENT>
   <COMPONENT NAME="g load i" TYPE="INTEGRATOR">
     INPUT          fcs/g-load-error
     C1             0.005
   </COMPONENT>
   <COMPONENT NAME="g load d" TYPE="LEAD_LAG_FILTER">
     INPUT          fcs/g-load-error
     C1            -0.000125
     C2             0.0
     C3             0.0
     C4             1.0
   </COMPONENT>
   <COMPONENT NAME="g load command" TYPE="SUMMER">
     INPUT          fcs/g-load-p
     INPUT          fcs/g-load-i
     INPUT          fcs/g-load-d
     CLIPTO         -1 1
    </COMPONENT>
    <COMPONENT NAME="Elevator Control" TYPE="AEROSURFACE_SCALE">
       INPUT         fcs/g-load-command
       MIN          -0.524
       MAX           0.524
       OUTPUT        fcs/elevator-pos-rad
     </COMPONENT>
     <COMPONENT NAME="roll rate norm" TYPE="PURE_GAIN">
       INPUT         velocities/p-aero-rad_sec
       GAIN          0.318309886
     </COMPONENT>
     <COMPONENT NAME="roll trim error" TYPE="SUMMER">
       INPUT         fcs/aileron-cmd-norm
       INPUT         fcs/roll-trim-cmd-norm
       INPUT         -fcs/roll-rate-norm
     </COMPONENT>
     <COMPONENT NAME="roll rate p" TYPE="PURE_GAIN">
       INPUT          fcs/roll-trim-error
       GAIN           3.0
     </COMPONENT>
     <COMPONENT NAME="roll rate i" TYPE="INTEGRATOR">
       INPUT          fcs/roll-trim-error
       C1             0.05
     </COMPONENT>
     <COMPONENT NAME="roll rate d" TYPE="LEAD_LAG_FILTER">
       INPUT          fcs/roll-trim-error
       C1            -0.00125
       C2             0.0
       C3             0.0
       C4             1.0
     </COMPONENT>
     <COMPONENT NAME="roll rate command" TYPE="SUMMER">
       INPUT          fcs/roll-rate-p
       INPUT          fcs/roll-rate-i
       INPUT          fcs/roll-rate-d
       CLIPTO         -1 1
     </COMPONENT>
     <COMPONENT NAME="Left Aileron Control" TYPE="AEROSURFACE_SCALE">
       INPUT         fcs/roll-rate-command
       MIN          -0.524
       MAX           0.524
       OUTPUT        fcs/left-aileron-pos-rad
     </COMPONENT>
      <COMPONENT NAME="Right Aileron Control" TYPE="AEROSURFACE_SCALE">
       INPUT        -fcs/roll-rate-command
       MIN          -0.524
       MAX           0.524
       OUTPUT        fcs/right-aileron-pos-rad
     </COMPONENT>
     <COMPONENT NAME="yaw rate norm" TYPE="PURE_GAIN">
       INPUT         velocities/r-aero-rad_sec
       GAIN          0.318309886
     </COMPONENT>
     <COMPONENT NAME="yaw trim error" TYPE="SUMMER">
       INPUT         fcs/rudder-cmd-norm
       INPUT         fcs/yaw-trim-cmd-norm
       INPUT         fcs/yaw-rate-norm
     </COMPONENT>
     <COMPONENT NAME="yaw rate p" TYPE="PURE_GAIN">
       INPUT          fcs/yaw-trim-error
       GAIN           3.0
     </COMPONENT>
     <COMPONENT NAME="yaw rate i" TYPE="INTEGRATOR">
       INPUT          fcs/yaw-trim-error
       C1             0.05
     </COMPONENT>
     <COMPONENT NAME="yaw rate d" TYPE="LEAD_LAG_FILTER">
       INPUT          fcs/yaw-trim-error
       C1            -0.00125
       C2             0.0
       C3             0.0
       C4             1.0
     </COMPONENT>
     <COMPONENT NAME="yaw rate command" TYPE="SUMMER">
       INPUT          fcs/yaw-rate-p
       INPUT          fcs/yaw-rate-i
       INPUT          fcs/yaw-rate-d
       CLIPTO         -1 1
     </COMPONENT>
     <COMPONENT NAME="Rudder Control" TYPE="AEROSURFACE_SCALE">
       INPUT        fcs/yaw-rate-command
       MIN         -0.524
       MAX          0.524
       OUTPUT       fcs/rudder-pos-rad
     </COMPONENT>
     <COMPONENT NAME="Alpha Norm Gain" TYPE="PURE_GAIN">
       INPUT          aero/alpha-rad
       GAIN           1.909859317
       OUTPUT         fcs/alpha-norm
     </COMPONENT>
     <COMPONENT NAME="LEF Control" TYPE="KINEMAT">
       INPUT        fcs/alpha-norm
       DETENTS      3
                   -2    0.5
                    15   1
                    25   2
       OUTPUT      fcs/lef-pos-deg
     </COMPONENT>
     <COMPONENT NAME="Throttle1" TYPE="PURE_GAIN">
      INPUT        fcs/throttle-cmd-norm[0]
      GAIN         2.0
      OUTPUT       fcs/throttle-pos-norm[0]
     </COMPONENT>
     <COMPONENT NAME="Flap Command" TYPE="SWITCH">
      <TEST LOGIC="DEFAULT" VALUE="0">
      </TEST>
      <TEST LOGIC="AND" VALUE="1">
        velocities/vc-kts < 250
      </TEST>
      <TEST LOGIC="OR" VALUE="1">
        gear/gear-cmd-norm == 1
      </TEST>
     </COMPONENT>
     <COMPONENT NAME="Flaps Control" TYPE="KINEMAT">
       INPUT        fcs/flap-command
       DETENTS      3
                   -2    0.5
                    0    0
                    30   3
       OUTPUT       fcs/flap-pos-deg
     </COMPONENT>
     <COMPONENT NAME="Speedbrake Control" TYPE="KINEMAT">
       INPUT        fcs/speedbrake-cmd-norm
       DETENTS      2
                    0    0
                    1    1
       OUTPUT      fcs/speedbrake-pos-norm
     </COMPONENT>
     <COMPONENT NAME="Gear Control" TYPE="KINEMAT">
       INPUT        gear/gear-cmd-norm
       DETENTS      2
                    0    0
                    1    5
       OUTPUT       gear/gear-pos-norm
      </COMPONENT>
      <COMPONENT NAME="Scheduled Steer Pos Deg" TYPE="SCHEDULED_GAIN">
       INPUT        fcs/steer-cmd-norm
       SCHEDULED_BY velocities/vg-fps
       ROWS         3
        10.0        80.0
        50.0        15.0
        150.0       2.0
       OUTPUT       fcs/steer-pos-deg[0]
      </COMPONENT>
  </FLIGHT_CONTROL>
  <AERODYNAMICS>
    AC_ALPHALIMITS -0.175 0.785
    <AXIS NAME="LIFT">
      <GROUP NAME="CLb">
      Basic_lift
        <FACTOR NAME="kCLge" TYPE="VECTOR">
           Change_in_lift_due_to_ground_effect
           13
           aero/h_b-mac-ft
           none
           0.0   1.229
           0.1   1.124
           0.15  1.116
           0.2   1.124
           0.3   1.105
           0.4   1.041
           0.5   1.034
           0.6   1.019
           0.7   1.008
           0.8   1.003
           0.9   1.001
           1.0   1.000
           1.1   1.000
        </FACTOR>
        <COEFFICIENT NAME="CLDh" TYPE="TABLE">
           Lift_due_to_horizontal_tail_deflection
           12 5
           aero/alpha-rad
           fcs/elevator-pos-rad
           aero/qbar-psf|metrics/Sw-sqft
                  -0.436 -0.218  0.0    0.218  0.436
           -0.175 -0.659 -0.709 -0.754 -0.792 -0.825
           -0.087 -0.151 -0.196 -0.238 -0.278 -0.316
            0.000  0.183  0.141  0.100  0.059  0.017
            0.087  0.491  0.454  0.414  0.371  0.326
            0.175  0.797  0.763  0.725  0.680  0.630
            0.262  1.108  1.079  1.041  0.993  0.940
            0.349  1.395  1.366  1.327  1.274  1.214
            0.436  1.615  1.587  1.547  1.490  1.427
            0.524  1.804  1.777  1.737  1.674  1.610
            0.611  1.900  1.872  1.829  1.766  1.699
            0.698  1.898  1.869  1.822  1.757  1.689
            0.785  1.753  1.724  1.674  1.612  1.546
        </COEFFICIENT>
        <COEFFICIENT NAME="CLDlef" TYPE="VECTOR">
           Lift_due_to_leading_edge_flap_deflection
           12
           aero/alpha-rad
           aero/qbar-psf|metrics/Sw-sqft|fcs/components/lef-control/output-norm
           -0.175 -0.012
           -0.087 -0.004
            0.000  0.002
            0.087  0.007
            0.175  0.012
            0.262  0.018
            0.349  0.022
            0.436  0.025
            0.524  0.026
            0.611  0.028
            0.698  0.028
            0.785  0.025
        </COEFFICIENT>
        <!-- aeromatic -->
        <COEFFICIENT NAME="CLDflaps" TYPE="VALUE">
          Delta_Lift_due_to_trailing_edge_flaps
          aero/qbar-psf|metrics/Sw-sqft|fcs/components/flaps-control/output-norm
          0.35
        </COEFFICIENT>
        <COEFFICIENT NAME="CLDsb" TYPE="VECTOR">
           Lift_due_to_speedbrake_deflection
           12
           aero/alpha-rad
           aero/qbar-psf|metrics/Sw-sqft|fcs/mag-speedbrake-pos-rad
           -0.175  0.382
           -0.087  0.385
            0.000  0.386
            0.087  0.264
            0.175  0.284
            0.262  0.379
            0.349  0.134
            0.436  0.008
            0.524 -0.137
            0.611 -0.192
            0.698 -0.122
            0.785 -0.111
        </COEFFICIENT>
      </GROUP>
      <COEFFICIENT NAME="CLq" TYPE="VECTOR">
         Lift_due_to_pitch_rate
         12
         aero/alpha-rad
         aero/qbar-psf|metrics/Sw-sqft|velocities/q-aero-rad_sec|aero/ci2vel
         -0.175  8.7127
         -0.087 25.7114
          0.000 28.9000
          0.087 31.3973
          0.175 31.0872
          0.262 30.4071
          0.349 26.9735
          0.436 26.4242
          0.524 25.8647
          0.611 25.2654
          0.698 30.5158
          0.785 25.8165
     </COEFFICIENT>
     <COEFFICIENT NAME="CLq_Dsb" TYPE="VECTOR">
         Lift_due_to_speedbrake_deflection
         12
         aero/alpha-rad
         aero/qbar-psf|metrics/Sw-sqft|velocities/q-aero-rad_sec|aero/ci2vel|fcs/mag-speedbrake-pos-rad
         -0.175 -0.256
         -0.087 -0.062
          0.000 -0.010
          0.087  0.020
          0.175 -0.011
          0.262  0.053
          0.349  0.063
          0.436 -0.009
          0.524  0.034
          0.611  0.042
          0.698  0.005
          0.785  0.001
      </COEFFICIENT>
    </AXIS>
    <AXIS NAME="DRAG">
      <COEFFICIENT NAME="CDDh" TYPE="TABLE">
        Drag_due_to_horizontal_tail_deflection
        12 5
        aero/alpha-rad
        fcs/elevator-pos-rad
        aero/qbar-psf|metrics/Sw-sqft
               -0.436 -0.218  0.0    0.218  0.436
        -0.175  0.217  0.174  0.156  0.181  0.230
        -0.087  0.094  0.055  0.041  0.062  0.101
         0.000  0.081  0.040  0.021  0.039  0.076
         0.087  0.106  0.061  0.040  0.057  0.101
         0.175  0.166  0.119  0.096  0.114  0.158
         0.262  0.252  0.203  0.182  0.202  0.240
         0.349  0.404  0.362  0.347  0.371  0.416
         0.436  0.628  0.588  0.577  0.601  0.637
         0.524  0.875  0.840  0.826  0.852  0.880
         0.611  1.127  1.095  1.084  1.102  1.125
         0.698  1.365  1.334  1.326  1.338  1.356
         0.785  1.517  1.487  1.478  1.482  1.489
      </COEFFICIENT>
      <!-- aeromatic -->
      <COEFFICIENT NAME="CDmach" TYPE="VECTOR">
       Drag_due_to_mach
       4
       velocities/mach-norm
       aero/qbar-psf|metrics/Sw-sqft
       0.0       0.000
       0.81      0.000
       1.1       0.023
       1.8       0.015
      </COEFFICIENT>
      <COEFFICIENT NAME="CDDlef" TYPE="VECTOR">
        Drag_due_to_leading_edge_flap_deflection
        12
        aero/alpha-rad
        aero/qbar-psf|metrics/Sw-sqft|fcs/components/lef-control/output-norm
        -0.175  0.003
        -0.087  0.001
         0.000  0.000
         0.087  0.001
         0.175  0.002
         0.262  0.004
         0.349  0.007
         0.436  0.011
         0.524  0.015
         0.611  0.019
         0.698  0.023
         0.785  0.024
      </COEFFICIENT>
      <!-- aeromatic -->
      <COEFFICIENT NAME="CDDflaps" TYPE="VALUE">
         Drag_due_to_trailing_edge_flaps
         aero/qbar-psf|metrics/Sw-sqft|fcs/components/flaps-control/output-norm
         0.08
      </COEFFICIENT>
      <COEFFICIENT NAME="CDgear" TYPE="VALUE">
        Drag_due_to_gear
        aero/qbar-psf|metrics/Sw-sqft|gear/gear-pos-norm
        0.027
      </COEFFICIENT>
      <COEFFICIENT NAME="CDDsb" TYPE="VECTOR">
        Drag_due_to_speedbrake_deflection
        12
        aero/alpha-rad
        aero/qbar-psf|metrics/Sw-sqft|fcs/mag-speedbrake-pos-rad
        -0.175 -0.057
        -0.087 -0.024
         0.000  0.010
         0.087  0.059
         0.175  0.130
         0.262  0.229
         0.349  0.243
         0.436  0.212
         0.524  0.150
         0.611  0.110
         0.698  0.143
         0.785  0.125
      </COEFFICIENT>
      <COEFFICIENT NAME="CDq" TYPE="VECTOR">
        Drag_due_to_pitch_rate
        12
        aero/alpha-rad
        aero/qbar-psf|metrics/Sw-sqft|velocities/q-aero-rad_sec|aero/ci2vel
        -0.175 -1.265
        -0.087 -2.139
         0.000 -0.308
         0.087  1.402
         0.175  3.369
         0.262  5.135
         0.349  6.880
         0.436 10.060
         0.524 13.201
         0.611 15.872
         0.698 23.217
         0.785 24.105
      </COEFFICIENT>
      <COEFFICIENT NAME="CDq_Dlef" TYPE="VECTOR">
        Drag_due_to_pitch_rate_and_leading_edge_flap_deflection
        12
        aero/alpha-rad
        aero/qbar-psf|metrics/Sw-sqft|velocities/q-aero-rad_sec|aero/ci2vel|fcs/components/lef-control/output-norm
        -0.175  0.067
        -0.087  0.034
         0.000  0.028
         0.087  0.029
         0.175  0.033
         0.262  0.059
         0.349  0.061
         0.436  0.027
         0.524  0.036
         0.611  0.047
         0.698  0.029
         0.785  0.015
      </COEFFICIENT>
    </AXIS>
    <AXIS NAME="SIDE">
      <COEFFICIENT NAME="CYb" TYPE="VALUE">
        Side_force_due_to_beta
        aero/qbar-psf|metrics/Sw-sqft|aero/beta-rad
        -1.146
      </COEFFICIENT>
      <COEFFICIENT NAME="CYb_M" TYPE="VECTOR">
       Change_in_Side_force_due_to_beta_due_to_mach
       3
       velocities/mach-norm
       aero/qbar-psf|metrics/Sw-sqft|aero/beta-rad
       0.4	0.0
       1.2      0.0573
       1.6     -0.1719
      </COEFFICIENT>
      <COEFFICIENT NAME="CYDa" TYPE="VALUE">
        Side_force_due_to_aileron
        aero/qbar-psf|metrics/Sw-sqft|fcs/left-aileron-pos-rad
        -2.2575e-2
      </COEFFICIENT>
      <COEFFICIENT NAME="CYdr" TYPE="VALUE">
        Side_force_due_to_rudder
        aero/qbar-psf|metrics/Sw-sqft|fcs/rudder-pos-rad
        0.086
      </COEFFICIENT>
      <COEFFICIENT NAME="CYp" TYPE="VECTOR">
        Side_force_due_to_roll_rate
        12
        aero/alpha-rad
        aero/qbar-psf|metrics/Sw-sqft|aero/bi2vel|velocities/p-aero-rad_sec
        -0.175 -0.108
        -0.087 -0.108
         0.0   -0.188
         0.087  0.110
         0.175  0.258
         0.262  0.226
         0.349  0.344
         0.436  0.362
         0.524  0.611
         0.611  0.529
         0.698  0.298
         0.785 -0.227
      </COEFFICIENT>
      <COEFFICIENT NAME="CYr" TYPE="VECTOR">
        Side_force_due_to_yaw_rate
        12
        aero/alpha-rad
        aero/qbar-psf|metrics/Sw-sqft|aero/bi2vel|velocities/r-aero-rad_sec
        -0.175  0.882
        -0.087  0.852
         0.0    0.876
         0.087  0.958
         0.175  0.962
         0.262  0.974
         0.349  0.819
         0.436  0.483
         0.524  0.590
         0.611  1.21
         0.698 -0.493
         0.785 -1.04
      </COEFFICIENT>
    </AXIS>
    <AXIS NAME="ROLL">
      <!--
         - X body axis aerodynamic moment coefficient (CL)
         - ALPHA  = Angle Of Attack in Degr (-10 <= ALPHA <= 45)
         -|BETA|= Sideslip angle in Degr (-30 <= BETA <= 30)
        -->
      <COEFFICIENT NAME="Clb" TYPE="TABLE">
        Roll_moment_due_to_beta
        12 13
        aero/alpha-rad
        aero/beta-rad
        aero/qbar-psf|metrics/Sw-sqft|metrics/bw-ft
               -0.524 -0.436 -0.349 -0.262 -0.175 -0.087  0.0  0.087  0.175  0.262  0.349  0.436  0.524
        -0.175 -0.009 -0.007 -0.000  0.001  0.003  0.001  0.0 -0.001 -0.003 -0.001  0.000  0.007  0.009
        -0.087  0.011  0.010  0.010  0.010  0.009  0.004  0.0 -0.004 -0.009 -0.010 -0.010 -0.010 -0.011
         0.0    0.023  0.023  0.022  0.020  0.017  0.008  0.0 -0.008 -0.017 -0.020 -0.022 -0.023 -0.023
         0.087  0.037  0.034  0.034  0.030  0.024  0.012  0.0 -0.012 -0.024 -0.030 -0.034 -0.034 -0.037
         0.175  0.050  0.049  0.047  0.039  0.030  0.016  0.0 -0.016 -0.030 -0.039 -0.047 -0.049 -0.050
         0.262  0.068  0.063  0.060  0.054  0.041  0.022  0.0 -0.022 -0.041 -0.054 -0.060 -0.063 -0.068
         0.349  0.089  0.081  0.069  0.057  0.045  0.022  0.0 -0.022 -0.045 -0.057 -0.069 -0.081 -0.089
         0.436  0.088  0.079  0.067  0.054  0.040  0.021  0.0 -0.021 -0.040 -0.054 -0.067 -0.079 -0.088
         0.524  0.091  0.060  0.033  0.023  0.016  0.015  0.0 -0.015 -0.016 -0.023 -0.033 -0.060 -0.091
         0.611  0.076  0.058  0.036  0.006  0.002  0.008  0.0 -0.008 -0.002 -0.006 -0.036 -0.058 -0.076
         0.698  0.077  0.062  0.035  0.014  0.010  0.013  0.0 -0.013 -0.010 -0.014 -0.035 -0.062 -0.077
         0.785  0.076  0.059  0.035  0.027  0.019  0.015  0.0 -0.015 -0.019 -0.027 -0.035 -0.059 -0.076
      </COEFFICIENT>
      <COEFFICIENT NAME="Clb_M" TYPE="VECTOR">
       Change_in_Roll_moment_due_to_beta_due_to_mach
       6
       velocities/mach-norm
       aero/qbar-psf|metrics/Sw-sqft|metrics/bw-ft|aero/beta-rad
       0.6	0.0
       0.8      0.1891
       1.0      0.1776
       1.2      0.1375
       1.4      0.1203
       1.6      0.0859
      </COEFFICIENT>
      <COEFFICIENT NAME="Clp" TYPE="VECTOR">
        Roll_moment_due_to_roll_rate_(roll_damping)
        12
        aero/alpha-rad
        aero/qbar-psf|metrics/Sw-sqft|metrics/bw-ft|aero/bi2vel|velocities/p-aero-rad_sec
        -0.175 -0.360
        -0.087 -0.359
         0.0   -0.443
         0.087 -0.420
         0.175 -0.383
         0.262 -0.375
         0.349 -0.329
         0.436 -0.294
         0.524 -0.230
         0.611 -0.210
         0.698 -0.120
         0.785 -0.100
      </COEFFICIENT>
      <COEFFICIENT NAME="Clr" TYPE="VECTOR">
        Roll_moment_due_to_yaw_rate
        12
        aero/alpha-rad
        aero/qbar-psf|metrics/Sw-sqft|metrics/bw-ft|aero/bi2vel|velocities/r-aero-rad_sec
        -0.175 -0.126
        -0.087 -0.026
         0.0    0.063
         0.087  0.113
         0.175  0.208
         0.262  0.230
         0.349  0.319
         0.436  0.437
         0.524  0.680
         0.611  0.100
         0.698  0.447
         0.785 -0.330
      </COEFFICIENT>
      <COEFFICIENT NAME="Clda" TYPE="TABLE">
        Roll_moment_due_to_aileron
        12 7
        aero/alpha-rad
        aero/beta-rad
        aero/qbar-psf|metrics/Sw-sqft|metrics/bw-ft|fcs/left-aileron-pos-rad
               -0.524 -0.349 -0.175  0.0    0.175  0.349  0.524
        -0.175  0.041  0.041  0.042  0.040  0.043  0.044  0.043
        -0.087  0.052  0.053  0.053  0.052  0.049  0.048  0.049
         0.0    0.053  0.053  0.052  0.051  0.048  0.048  0.047
         0.087  0.056  0.053  0.051  0.052  0.049  0.047  0.045
         0.175  0.050  0.050  0.049  0.048  0.043  0.042  0.042
         0.262  0.056  0.051  0.049  0.048  0.042  0.041  0.037
         0.349  0.082  0.066  0.043  0.042  0.042  0.020  0.003
         0.436  0.059  0.043  0.035  0.037  0.036  0.028  0.013
         0.524  0.042  0.038  0.026  0.031  0.025  0.013  0.010
         0.611  0.038  0.027  0.016  0.026  0.021  0.014  0.003
         0.698  0.027  0.023  0.018  0.017  0.016  0.011  0.007
         0.785  0.017  0.016  0.014  0.012  0.011 -0.010  0.008
      </COEFFICIENT>
      <COEFFICIENT NAME="Clda_M" TYPE="VECTOR">
       Change_in_Roll_moment_due_to_aileron_due_to_mach
       3
       velocities/mach-norm
       aero/qbar-psf|metrics/Sw-sqft|metrics/bw-ft|aero/alpha-rad|fcs/left-aileron-pos-rad
       0.6      0.0
       1.2     -0.063
       1.6     -0.063
      </COEFFICIENT>
      <COEFFICIENT NAME="Cldr_M" TYPE="VECTOR">
       Change_in_Roll_moment_due_to_rudder_due_to_mach
       2
       velocities/mach-norm
       aero/qbar-psf|metrics/Sw-sqft|metrics/bw-ft|aero/alpha-rad|fcs/rudder-pos-rad
       0.6      0.0
       1.6     -0.0201
      </COEFFICIENT>
      <COEFFICIENT NAME="Cldr" TYPE="TABLE">
        Roll_moment_due_to_rudder
        12 7
        aero/alpha-rad
        aero/beta-rad
        aero/qbar-psf|metrics/Sw-sqft|metrics/bw-ft|fcs/rudder-pos-rad
               -0.524 -0.349 -0.175  0.0    0.175  0.349  0.524
        -0.175  0.005  0.007  0.013  0.018  0.015  0.021  0.023
        -0.087  0.017  0.016  0.013  0.015  0.014  0.011  0.010
         0.0    0.014  0.014  0.011  0.015  0.013  0.010  0.011
         0.087  0.010  0.014  0.012  0.014  0.013  0.011  0.011
         0.175 -0.005  0.013  0.011  0.014  0.012  0.010  0.011
         0.262  0.009  0.009  0.009  0.014  0.011  0.009  0.010
         0.349  0.019  0.012  0.008  0.014  0.011  0.008  0.008
         0.436  0.005  0.005  0.005  0.015  0.010  0.010  0.010
         0.524  0.000  0.000  0.000  0.013  0.008  0.006  0.006
         0.611 -0.005  0.004  0.005  0.011  0.008  0.005  0.014
         0.698 -0.011  0.009  0.003  0.006  0.007  0.000  0.020
         0.785  0.008  0.007  0.005  0.001  0.003  0.001  0.000
      </COEFFICIENT>
    </AXIS>
    <AXIS NAME="PITCH">
      <COEFFICIENT NAME="CmDh" TYPE="TABLE">
        Pitch_moment_due_to_horizontal_tail_deflection
        12 5
        aero/alpha-rad
        fcs/elevator-pos-rad
        aero/qbar-psf|metrics/Sw-sqft|metrics/cbarw-ft
               -0.436 -0.218  0.0    0.218  0.436
        -0.175  0.205  0.081 -0.046 -0.174 -0.259
        -0.087  0.168  0.077 -0.020 -0.145 -0.202
         0.0    0.186  0.107 -0.009 -0.121 -0.184
         0.087  0.196  0.110 -0.005 -0.127 -0.193
         0.175  0.213  0.110 -0.006 -0.129 -0.199
         0.262  0.251  0.141  0.010 -0.102 -0.150
         0.349  0.245  0.127  0.006 -0.097 -0.160
         0.436  0.238  0.119 -0.001 -0.113 -0.167
         0.524  0.252  0.133  0.014 -0.087 -0.104
         0.611  0.231  0.108  0.000 -0.084 -0.076
         0.698  0.198  0.081 -0.013 -0.069 -0.041
         0.785  0.192  0.093  0.032 -0.006 -0.005
      </COEFFICIENT>
      <COEFFICIENT NAME="Cma_M" TYPE="VECTOR">
        Change_in_Pitch_moment_due_to_alpha_due_to_mach
        6
        velocities/mach-norm
        aero/qbar-psf|metrics/Sw-sqft|metrics/cbarw-ft|aero/alpha-rad
        0.6     0.0
        0.8     0.0974
        0.9    -0.3323
        1.6    -0.9626
        1.9    -0.8480
        2.2    -0.7907
      </COEFFICIENT>
      <COEFFICIENT NAME="Cmq" TYPE="VECTOR">
        Pitch_moment_due_to_pitch_rate
        12
        aero/alpha-rad
        aero/qbar-psf|metrics/Sw-sqft|metrics/cbarw-ft|aero/ci2vel|velocities/q-aero-rad_sec
        -0.175 -7.21
        -0.087 -5.40
         0.0   -5.23
         0.087 -5.26
         0.175 -6.11
         0.262 -6.64
         0.349 -5.69
         0.436 -6.00
         0.524 -6.20
         0.611 -6.40
         0.698 -6.60
         0.785 -6.00
      </COEFFICIENT>
    </AXIS>
    <AXIS NAME="YAW">
      <COEFFICIENT NAME="Cnb" TYPE="TABLE">
        Yaw_moment_due_to_beta
        12 13
        aero/alpha-rad
        aero/beta-rad
        aero/qbar-psf|metrics/Sw-sqft|metrics/bw-ft
               -0.524 -0.436 -0.349 -0.262 -0.175 -0.087  0.0  0.087  0.175  0.262  0.349  0.436  0.524
        -0.175 -0.079 -0.074 -0.064 -0.056 -0.038 -0.018  0.0  0.018  0.038  0.056  0.064  0.074  0.079
        -0.087 -0.090 -0.086 -0.077 -0.057 -0.042 -0.019  0.0  0.019  0.042  0.057  0.077  0.086  0.090
         0.0   -0.106 -0.093 -0.076 -0.059 -0.042 -0.018  0.0  0.018  0.042  0.059  0.076  0.093  0.106
         0.087 -0.106 -0.089 -0.074 -0.058 -0.042 -0.019  0.0  0.019  0.042  0.058  0.074  0.089  0.106
         0.175 -0.096 -0.080 -0.073 -0.058 -0.043 -0.019  0.0  0.019  0.043  0.058  0.073  0.080  0.096
         0.262 -0.080 -0.062 -0.057 -0.053 -0.039 -0.018  0.0  0.018  0.039  0.053  0.057  0.062  0.080
         0.349 -0.068 -0.049 -0.029 -0.032 -0.030 -0.013  0.0  0.013  0.030  0.032  0.029  0.049  0.068
         0.436 -0.030 -0.022 -0.007 -0.012 -0.017 -0.007  0.0  0.007  0.017  0.012  0.007  0.022  0.030
         0.524 -0.064 -0.028 -0.012 -0.002 -0.004 -0.004  0.0  0.004  0.004  0.002  0.012  0.028  0.064
         0.611 -0.015  0.012  0.034  0.046  0.035  0.014  0.0 -0.014 -0.035 -0.046 -0.034 -0.012  0.015
         0.698 -0.011  0.002  0.065  0.071  0.047  0.017  0.0 -0.017 -0.047 -0.071 -0.065 -0.002  0.011
         0.785  0.001  0.013  0.041  0.073  0.057  0.033  0.0 -0.033 -0.057 -0.073 -0.041 -0.013 -0.001
      </COEFFICIENT>
      <COEFFICIENT NAME="Cnb_M" TYPE="VECTOR">
       Change_in_Yaw_moment_due_to_beta_due_to_mach
       8
       velocities/mach-norm
       aero/qbar-psf|metrics/Sw-sqft|metrics/bw-ft|aero/beta-rad
       0.6      0.0
       0.7     -0.0688
       0.8     -0.0172
       0.9      0.0229
       1.0      0.0
       1.2     -0.0688
       1.4      0.0057
       1.6      0.0688
      </COEFFICIENT>
      <COEFFICIENT NAME="Cnp" TYPE="VECTOR">
        Yaw_moment_due_to_roll_rate
        12
        aero/alpha-rad
        aero/qbar-psf|metrics/Sw-sqft|metrics/bw-ft|aero/bi2vel|velocities/p-aero-rad_sec
        -0.175 -0.061
        -0.087 -0.052
         0.0   -0.052
         0.087  0.012
         0.175  0.013
         0.262  0.024
         0.349 -0.050
         0.436 -0.150
         0.524 -0.130
         0.611 -0.158
         0.698 -0.240
         0.785 -0.150
      </COEFFICIENT>
      <COEFFICIENT NAME="Cnr" TYPE="VECTOR">
        Yaw_moment_due_to_yaw_rate
        12
        aero/alpha-rad
        aero/qbar-psf|metrics/Sw-sqft|metrics/bw-ft|aero/bi2vel|velocities/r-aero-rad_sec
        -0.175 -0.380
        -0.087 -0.363
         0.0   -0.378
         0.087 -0.386
         0.175 -0.370
         0.262 -0.453
         0.349 -0.550
         0.436 -0.582
         0.524 -0.595
         0.611 -0.637
         0.698 -1.02
         0.785 -0.840
      </COEFFICIENT>
      <COEFFICIENT NAME="Cnda_M" TYPE="VECTOR">
       Change_in_Yaw_moment_due_to_aileron_due_to_mach
       6
       velocities/mach-norm
       aero/qbar-psf|metrics/Sw-sqft|metrics/bw-ft|fcs/left-aileron-pos-rad
       0.6      0.0
       0.8      0.0149
       1.0     -0.0011
       1.2      0.0097
       1.4      0.0126
       1.6     -0.0040
      </COEFFICIENT>
      <COEFFICIENT NAME="Cnda" TYPE="TABLE">
        Yaw_moment_due_to_aileron
        12 7
        aero/alpha-rad
        aero/beta-rad
        aero/qbar-psf|metrics/Sw-sqft|metrics/bw-ft|fcs/left-aileron-pos-rad
               -0.524 -0.349 -0.175  0.0    0.175  0.349  0.524
        -0.175  0.001  0.002  0.006  0.011  0.015  0.024 -0.022
        -0.087  0.027  0.014  0.008  0.011  0.015  0.010 -0.002
         0.0    0.017  0.016  0.006  0.010  0.014  0.004  0.003
         0.087  0.013  0.016  0.006  0.009  0.012  0.002  0.005
         0.175  0.012  0.014  0.005  0.008  0.011  0.001  0.003
         0.262  0.016  0.019  0.008  0.006  0.008 -0.003  0.001
         0.349 -0.001  0.021  0.005 -0.000  0.002 -0.014  0.009
         0.436 -0.017 -0.002 -0.007 -0.004 -0.002 -0.006  0.009
         0.524 -0.011 -0.012 -0.004 -0.007 -0.006  0.001  0.001
         0.611 -0.017 -0.016 -0.007 -0.010 -0.012 -0.004 -0.003
         0.698 -0.008 -0.015 -0.006 -0.004 -0.011 -0.004  0.002
         0.785 -0.016 -0.011 -0.006 -0.010 -0.011 -0.006 -0.001
      </COEFFICIENT>
      <COEFFICIENT NAME="Cndr" TYPE="TABLE">
        Yaw_moment_due_to_rudder
        12 7
        aero/alpha-rad
        aero/beta-rad
        aero/qbar-psf|metrics/Sw-sqft|metrics/bw-ft|fcs/rudder-pos-rad
               -0.524 -0.349 -0.175  0.0    0.175  0.349  0.524
        -0.175 -0.018 -0.028 -0.037 -0.048 -0.043 -0.052 -0.062
        -0.087 -0.052 -0.051 -0.041 -0.045 -0.044 -0.034 -0.034
         0.0   -0.052 -0.043 -0.038 -0.045 -0.041 -0.036 -0.027
         0.087 -0.052 -0.046 -0.040 -0.045 -0.041 -0.036 -0.028
         0.175 -0.054 -0.045 -0.040 -0.044 -0.040 -0.035 -0.027
         0.262 -0.049 -0.049 -0.038 -0.045 -0.038 -0.028 -0.027
         0.349 -0.059 -0.057 -0.037 -0.047 -0.034 -0.024 -0.023
         0.436 -0.051 -0.052 -0.030 -0.048 -0.035 -0.023 -0.023
         0.524 -0.030 -0.030 -0.027 -0.049 -0.035 -0.020 -0.019
         0.611 -0.037 -0.033 -0.024 -0.045 -0.029 -0.016 -0.009
         0.698 -0.026 -0.030 -0.019 -0.033 -0.022 -0.010 -0.025
         0.785 -0.013 -0.008 -0.013 -0.016 -0.009 -0.014 -0.010
      </COEFFICIENT>
      <COEFFICIENT NAME="Cndr_M" TYPE="VECTOR">
        Change_in_Yaw_moment_due_to_rudder_due_to_mach
        3
        velocities/mach-norm
        aero/qbar-psf|metrics/Sw-sqft|metrics/bw-ft|aero/alpha-rad|fcs/rudder-pos-rad
        0.6     0.0
        1.2     0.0401
        1.6     0.0716
       </COEFFICIENT>
    </AXIS>
  </AERODYNAMICS>
</FDM_CONFIG>
